/**
  Class template for creating a model that can be used to calibrate the legs
*/
#class_template LegCalibrationModel(Side, BodyModelRef) {
  AnyComponentDefinition CDef = {};

  #var AnyObjectPtr HipPositions;
  #var AnyObjectPtr KneePositions;
  #var AnyObjectPtr AnklePositions;
  #var AnyObjectPtr SubTalarPositions;

  AnyFolder &TrunkSegments = BodyModelRef.Trunk.Segments;
  AnyFolder &TrunkJoints = BodyModelRef.Trunk.Joints;

  AnyFolder &LegSegments = BodyModelRef.Side.Leg.Seg;
  AnyFolder &LegJoints = BodyModelRef.Side.Leg.Jnt;

  // Constraints
  AnyFixedRefFrame ground = {
    AnyRefNode node = {
      ARel = ..TrunkSegments.PelvisSeg.Axes0;
      sRel = ..TrunkSegments.PelvisSeg.r0;
    };
  };

  AnyKinEq ThoraxFix = {
    AnyKinMeasure& PelvisThoraxExtension = BodyModelRef.Interface.Trunk.PelvisThoraxExtension;
    AnyKinMeasure& PelvisThoraxLateralBending = BodyModelRef.Interface.Trunk.PelvisThoraxLateralBending;
    AnyKinMeasure& PelvisThoraxRotation = BodyModelRef.Interface.Trunk.PelvisThoraxRotation;
    AnyKinMeasure& SkullThoraxFlexion = BodyModelRef.Interface.Trunk.SkullThoraxFlexion;
    AnyKinMeasure& SkullThoraxRotation = BodyModelRef.Interface.Trunk.SkullThoraxRotation;
    AnyKinMeasure& SkullThoraxLateralBending = BodyModelRef.Interface.Trunk.SkullThoraxLateralBending;
  };

  AnyKinEq PelvisFix = {
    AnyKinLinear Lin = {
      AnyRefFrame &ground = ..ground.node;
      AnyRefFrame &Pelvis = ..TrunkSegments.PelvisSeg;
    };
    AnyKinRotational Rot = {
      Type = RotAxesAngles;
      AnyRefFrame &ground = ..ground.node;
      AnyRefFrame &Pelvis = ..TrunkSegments.PelvisSeg;
    };
  };

  AnyKinEqInterPolDriver Hip = {
    AnyKinRotational &Spherical = .BodyModelRef.Interface.Side.HipFlexion.HipMeasure;
    Type = PiecewiseLinear;
    T = linspace(0,1,SizesOf(Data)[1]);
    Data = Obj2Num(.HipPositions)' * pi/180;
    Reaction.Type = {Off, Off, Off};
    AnyInt expect_nPos_to_match_nStep = warn(eqfun(NumElemOf(T), ..nStep), strformat("The number of calibration positions (Data) in the: " + NameOf(ObjGetParent(0)) + " driver does not match the number of positions (nStep) in the study."));

  };

  AnyKinEqInterPolDriver Knee = {
    AnyKinMeasure& Hinge = .BodyModelRef.Interface.Side.KneeFlexion;
    Type = PiecewiseLinear;
    T = linspace(0,1,SizesOf(Data)[1]);
    Data = {Obj2Num(.KneePositions)} * pi/180;
    Reaction.Type = {Off};
    AnyInt expect_nPos_to_match_nStep = warn(eqfun(NumElemOf(T), ..nStep), strformat("The number of calibration positions (Data) in the: " + NameOf(ObjGetParent(0)) + " driver does not match the number of positions (nStep) in the study."));

  };

  AnyKinEqInterPolDriver Ankle = {
    AnyKinMeasure& Hinge = .BodyModelRef.Interface.Side.AnklePlantarFlexion;
    Type = PiecewiseLinear;
    T = linspace(0,1,SizesOf(Data)[1]);
    Data = {Obj2Num(.AnklePositions)} * pi/180;
    Reaction.Type = {Off};
    AnyInt expect_nPos_to_match_nStep = warn(eqfun(NumElemOf(T), ..nStep), strformat("The number of calibration positions (Data) in the: " + NameOf(ObjGetParent(0)) + " driver does not match the number of positions (nStep) in the study."));

  };

  AnyKinEqInterPolDriver SubTalar = {
    AnyKinMeasure& Hinge = .BodyModelRef.Interface.Side.SubTalarEversion;
    Type = PiecewiseLinear;
    T = linspace(0,1,SizesOf(Data)[1]);
    Data = {Obj2Num(.SubTalarPositions)} * pi/180;
    Reaction.Type = {Off};
    AnyInt expect_nPos_to_match_nStep = warn(eqfun(NumElemOf(T), ..nStep), strformat("The number of calibration positions (Data) in the: " + NameOf(ObjGetParent(0)) + " driver does not match the number of positions (nStep) in the study."));

  };
};


/**
  Class template for creating calibrationstudies with same settings
 */
#class_template LegCalibrationStudy(
  __CLASS__ = AnyBodyCalibrationStudy,
  BodyModelRef,
  Side,
) {
  // Study settings
  FiberAndTendonLengthAdjustment.CalibrateTendonAtMaxForceOnOff = Off;
  Kinematics.SmallStepAssumptionOnOff = Off;
  InitialConditions.SmallStepAssumptionOnOff = Off;
  Kinematics.PosAnalysisOnlyOnOff = On;
  InitialConditions.PosAnalysisOnlyOnOff = On;

  LegCalibrationModel ModelRef(Side=Side, BodyModelRef=BodyModelRef) = {
    HipPositions = .HipPositions;
    KneePositions = .KneePositions;
    AnklePositions = .AnklePositions;
    SubTalarPositions = .SubTalarPositions;
  };
};
