LegCalibrationStudy LeftCal1Hip(
BodyModelRef = Main.HumanModel.BodyModel,
Side = Left,
) = {
  nStep = .RightCal1Hip.nStep;

  MuscleArr = ObjSearch(
  &..BodyModel.Left.Leg.Mus,
  {
    "AdductorBrevis*.*",
    "AdductorLong*.*",
    "AdductorMagnus*.*",
    "Gemellus.*",
    "Gluteus*.*",
    "Iliacus*.*",
    "Obturator*.*",
    "Pectineus.*",
    "Piriformis.*",
    "QuadratusFemoris.*",
  },
  "AnyMuscle"
  );

  RminMuscleFiber = .RightCal1Hip.RminMuscleFiber;
  RmaxMuscleFiber = .RightCal1Hip.RmaxMuscleFiber;

  HipPositions = .RightCal1Hip.HipPositions;
  KneePositions = .RightCal1Hip.KneePositions;
  AnklePositions = .RightCal1Hip.AnklePositions;
  SubTalarPositions = .RightCal1Hip.SubTalarPositions;
};

LegCalibrationStudy LeftCal2HipSpine(
BodyModelRef = Main.HumanModel.BodyModel,
Side = Left,
) = {
  nStep = NumElemOf(HipPositions);

  MuscleArr = ObjSearch(
  &..BodyModel.Trunk.Muscles.Left,
  {
    "Psoas*.*",
  },
  "AnyMuscle"
  );

  RminMuscleFiber = repmat(NumElemOf(MuscleArr), .RValues.RMinDefault);
  RmaxMuscleFiber = repmat(NumElemOf(MuscleArr), .RValues.RMaxDefault);

  HipPositions = repmat(2, flattenptr(&.RangeOfMotion.Right.Leg.Hip.ActiveRoM));
  KneePositions = repmat(nStep, &.RangeOfMotion.Right.Leg.Knee.Neutral);
  AnklePositions = repmat(nStep, &.RangeOfMotion.Right.Leg.Ankle.Neutral);
  SubTalarPositions = repmat(nStep, &.RangeOfMotion.Right.Leg.Ankle.Neutral);
};

LegCalibrationStudy LeftCal3HipKnee(
BodyModelRef = Main.HumanModel.BodyModel,
Side = Left,
) = {
  nStep = NumElemOf(HipPositions);

  MuscleArr = ObjSearch(
  &..BodyModel.Left.Leg.Mus,
  {
    "BicepsFemorisCaputLongum.*",
    "Gracilis.*",
    "RectusFem*.*",
    "Sartorius.*",
    "Semimembranosus.*",
    "Semitendinosus.*",
    "TensorFasciaeLatae.*",
  },
  "AnyMuscle"
  );

  RminMuscleFiber = repmat(NumElemOf(MuscleArr), .RValues.RMinDefault);
  RmaxMuscleFiber = repmat(NumElemOf(MuscleArr), .RValues.RMaxDefault);

  HipPositions = repmat(2, flattenptr(&.RangeOfMotion.Right.Leg.Hip.ActiveRoM));
  KneePositions = repmat(10, flattenptr(&.RangeOfMotion.Right.Leg.Knee.ActiveRoM));
  AnklePositions = repmat(nStep, &.RangeOfMotion.Right.Leg.Ankle.Neutral);
  SubTalarPositions = repmat(nStep, &.RangeOfMotion.Right.Leg.Ankle.Neutral);
};

LegCalibrationStudy LeftCal4Knee(
BodyModelRef = Main.HumanModel.BodyModel,
Side = Left,
) = {
  nStep = NumElemOf(KneePositions);

  MuscleArr = ObjSearch(
  &..BodyModel.Left.Leg.Mus,
  {
    "BicepsFemorisCaputBreve.*",
    "Popliteus.*",
    "Vastus*.*",
  },
  "AnyMuscle"
  );

  RminMuscleFiber = repmat(NumElemOf(MuscleArr), .RValues.RMinDefault);
  RmaxMuscleFiber = repmat(NumElemOf(MuscleArr), .RValues.RMaxDefault);

  HipPositions = repmat(nStep, &.RangeOfMotion.Right.Leg.Hip.Neutral);
  KneePositions = repmat(2, flattenptr(&.RangeOfMotion.Right.Leg.Knee.ActiveRoM));
  AnklePositions = repmat(nStep, &.RangeOfMotion.Right.Leg.Ankle.Neutral);
  SubTalarPositions = repmat(nStep, &.RangeOfMotion.Right.Leg.Ankle.Neutral);
};

LegCalibrationStudy LeftCal5AnkleKnee(
BodyModelRef = Main.HumanModel.BodyModel,
Side = Left,
) = {
  nStep = NumElemOf(AnklePositions);

  MuscleArr = ObjSearch(
  &..BodyModel.Left.Leg.Mus,
  {
    "Gastroc*.*",
    "Peroneus*.*",
    "Plantaris.*",
  },
  "AnyMuscle"
  );

  RminMuscleFiber = repmat(NumElemOf(MuscleArr), .RValues.RMinDefault);
  RmaxMuscleFiber = repmat(NumElemOf(MuscleArr), .RValues.RMaxDefault);

  HipPositions = repmat(nStep, &.RangeOfMotion.Right.Leg.Hip.Neutral);
  KneePositions = repmat(4, flattenptr(&.RangeOfMotion.Right.Leg.Knee.ActiveRoM));
  AnklePositions = repmat(2, flattenptr(&.RangeOfMotion.Right.Leg.Ankle.ActiveRoM));
  SubTalarPositions = repmat(nStep, &.RangeOfMotion.Right.Leg.Ankle.Neutral);
};

LegCalibrationStudy LeftCal6Ankle(
BodyModelRef = Main.HumanModel.BodyModel,
Side = Left,
) = {
  nStep = NumElemOf(AnklePositions);
  MuscleArr = ObjSearch(
  &..BodyModel.Left.Leg.Mus,
  {
    "Extensor*.*",
    "Flexor*.*",
    "Soleus*.*",
    "Tibialis*.*",
  },
  "AnyMuscle"
  );

  RminMuscleFiber = repmat(NumElemOf(MuscleArr), .RValues.RMinDefault);
  RmaxMuscleFiber = repmat(NumElemOf(MuscleArr), .RValues.RMaxDefault);

  HipPositions = repmat(nStep, &.RangeOfMotion.Right.Leg.Hip.Neutral);
  KneePositions = repmat(nStep, &.RangeOfMotion.Right.Leg.Knee.Neutral);
  AnklePositions = repmat(2, flattenptr(&.RangeOfMotion.Right.Leg.Ankle.ActiveRoM));
  SubTalarPositions = repmat(nStep, &.RangeOfMotion.Right.Leg.Ankle.Neutral);
};


CalibrationSequence = {
  AnyOperation &LegCal1Left = .LeftCal1Hip.FiberAndTendonLengthAdjustment;
  AnyOperation &LegCal2Left = .LeftCal2HipSpine.FiberAndTendonLengthAdjustment;
  AnyOperation &LegCal3Left = .LeftCal3HipKnee.FiberAndTendonLengthAdjustment;
  AnyOperation &LegCal4Left = .LeftCal4Knee.FiberAndTendonLengthAdjustment;
  AnyOperation &LegCal5Left = .LeftCal5AnkleKnee.FiberAndTendonLengthAdjustment;
  AnyOperation &LegCal6Left = .LeftCal6Ankle.FiberAndTendonLengthAdjustment;
};
