TwoParCalibrationStudy RightCal1Hip(
  BodyModelRef=Main.HumanModel.BodyModel,
  Side=Right,
  HIP = On
) = {
  nStep = NumElemOf(HipPositions);

  MuscleArr = ObjSearch(
    &..BodyModel.Right.Leg.Mus,
    {
      "AdductorBrevis*.*",
      "AdductorLong*.*",
      "AdductorMagnus*.*",
      "Gemellus.*",
      "Gluteus*.*",
      "Iliacus*.*",
      "Obturator*.*",
      "Pectineus.*",
      "Piriformis.*",
      "QuadratusFemoris.*",
    },
    "AnyMuscle"
  );

  HipPositions = repmat(2, flattenptr(&.RangeOfMotion.Right.Leg.Hip.ActiveRoM));
};

TwoParCalibrationStudy RightCal2HipSpine(
  BodyModelRef=Main.HumanModel.BodyModel,
  Side=Right,
  HIP = On,
  TRUNKFLEXION = On,
  TRUNKLATERALBENDING = On,
  TRUNKROTATION = On,
) = {
  nStep = NumElemOf(HipPositions);

  MuscleArr = ObjSearch(
    &..BodyModel.Trunk.Muscles.Right,
    {
      "Psoas*.*",
    },
    "AnyMuscle"
  );

  HipPositions = repmat(2, flattenptr(&.RangeOfMotion.Right.Leg.Hip.ActiveRoM));
  TrunkFlexionPositions = flatten(transpose(reshape(repmat(10, flattenptr(&.RangeOfMotion.Trunk.ActiveRoMThoraxFlexion)), {10,2})));
  TrunkLateralBendingPositions = flatten(transpose(reshape(repmat(10, flattenptr(&.RangeOfMotion.Trunk.ActiveRoMThoraxLateralBending)), {10,2})));
  TrunkRotationPositions = flatten(transpose(reshape(repmat(10, flattenptr(&.RangeOfMotion.Trunk.ActiveRoMThoraxAxialRotation)), {10,2})));
};

TwoParCalibrationStudy RightCal3HipKnee(
  BodyModelRef=Main.HumanModel.BodyModel,
  Side=Right,
  HIP = On,
  KNEE = On,
) = {
  nStep = NumElemOf(HipPositions);

  MuscleArr = ObjSearch(
    &..BodyModel.Right.Leg.Mus,
    {
      "BicepsFemorisCaputLongum.*",
      "Gracilis.*",
      "RectusFem*.*",
      "Sartorius.*",
      "Semimembranosus.*",
      "Semitendinosus.*",
      "TensorFasciaeLatae.*",
    },
    "AnyMuscle"
  );

  HipPositions = repmat(2, flattenptr(&.RangeOfMotion.Right.Leg.Hip.ActiveRoM));
  KneePositions = flatten(transpose(reshape(repmat(10, flattenptr(&.RangeOfMotion.Right.Leg.Knee.ActiveRoM)), {10,2})));
};

TwoParCalibrationStudy RightCal4Knee(
  BodyModelRef=Main.HumanModel.BodyModel,
  Side=Right,
  KNEE = On,
) = {
  nStep = NumElemOf(KneePositions);

  MuscleArr = ObjSearch(
    &..BodyModel.Right.Leg.Mus,
    {
      "BicepsFemorisCaputBreve.*",
      "Popliteus.*",
      "Vastus*.*",
    },
    "AnyMuscle"
  );

  KneePositions = repmat(2, flattenptr(&.RangeOfMotion.Right.Leg.Knee.ActiveRoM));
};

TwoParCalibrationStudy RightCal5AnkleKnee(
  BodyModelRef=Main.HumanModel.BodyModel,
  Side=Right,
  KNEE = On,
  ANKLE = On,
) = {
  nStep = NumElemOf(AnklePositions);

  MuscleArr = ObjSearch(
    &..BodyModel.Right.Leg.Mus,
    {
      "Gastroc*.*",
      "Peroneus*.*",
      "Plantaris.*",
    },
    "AnyMuscle"
  );

  KneePositions = flatten(transpose(reshape(repmat(3, flattenptr(&.RangeOfMotion.Right.Leg.Knee.ActiveRoM)), {3,2})));
  AnklePositions = repmat(2, flattenptr(&.RangeOfMotion.Right.Leg.Ankle.ActiveRoMFlexion));
};

TwoParCalibrationStudy RightCal6Ankle(
  BodyModelRef=Main.HumanModel.BodyModel,
  Side=Right,
  ANKLE = On,
  SUBTALAR = On,
) = {
//  nStep = NumElemOf(AnklePositions);
    nStep = NumElemOf(Obj2Num(AnklePositions));
  MuscleArr = ObjSearch(
    &..BodyModel.Right.Leg.Mus,
    {
      "Extensor*.*",
      "Flexor*.*",
      "Soleus*.*",
      "Tibialis*.*",
    },
    "AnyMuscle"
  );

  AnklePositions = repmat(3, flattenptr(&.RangeOfMotion.Right.Leg.Ankle.ActiveRoMFlexion));
  SubTalarPositions = flatten(transpose(reshape(repmat(3, flattenptr(&.RangeOfMotion.Right.Leg.Ankle.ActiveRoMEversion)),{3,3})));

//  AnklePositions = repmat(3, flattenptr(&.RangeOfMotion.Right.Leg.Ankle.ActiveRoMFlexion));
//  SubTalarPositions = flatten(transpose(reshape(repmat(3, flattenptr(&.RangeOfMotion.Right.Leg.Ankle.ActiveRoMEversion)),{3,3})));

//    AnklePositions = Main.HumanModel.BodyModel.Right.Leg.Data.RangeOfMotion.Ankle.SweepActiveRoMFlexion;
//    SubTalarPositions = Main.HumanModel.BodyModel.Right.Leg.Data.RangeOfMotion.Ankle.SweepActiveRoMEversion;

    AnklePositions = &Main.HumanModel.BodyModel.Right.Leg.Data.RangeOfMotion.Ankle.circularSweep.v1Samples;
    SubTalarPositions = &Main.HumanModel.BodyModel.Right.Leg.Data.RangeOfMotion.Ankle.circularSweep.v2Samples;
};


CalibrationSequence = {
  AnyOperation &LegCal1Right = .RightCal1Hip.FiberAndTendonLengthAdjustment;
  AnyOperation &LegCal2Right = .RightCal2HipSpine.FiberAndTendonLengthAdjustment;
  AnyOperation &LegCal3Right = .RightCal3HipKnee.FiberAndTendonLengthAdjustment;
  AnyOperation &LegCal4Right = .RightCal4Knee.FiberAndTendonLengthAdjustment;
  AnyOperation &LegCal5Right = .RightCal5AnkleKnee.FiberAndTendonLengthAdjustment;
  AnyOperation &LegCal6Right = .RightCal6Ankle.FiberAndTendonLengthAdjustment;
};
